# OpenSim document version 30000
Model H0918v3:
  length_units: meters
  force_units: N
  gravity: 0 -9.80665 0
  credits:
    Planar model with 9 degrees-of-freedom and 18 muscles. Developed by Thomas Geijtenbeek for use in predictive simulations. Latest revision: 2023-03-06. Base model adapted from Delp1992. Hamstrings parameters adapted from Arnold2010. Quadriceps parameters derived from Arnold2010 and Rajagopal2016.
  publications:
    Geijtenbeek, T.: SCONE: Open Source Software for Biological Motion, Journal of Open Source Software 4(38), 2019.
  BodySet:
    Body ground: mass=0 mass_center=(0 0 0) inertia_xx=0 inertia_yy=0 inertia_zz=0
    Body pelvis: mass=11.777 mass_center=(-0.0707 0 0) inertia_xx=0.1028 inertia_yy=0.0871 inertia_zz=0.0579
        meshes=(sacrum.vtp pelvis.vtp l_pelvis.vtp)
      CustomJoint ground_pelvis: parent_body=ground location_in_parent=(0 0 0) location=(0 0 0)
        Coordinate pelvis_tilt: motion_type=rotational default_value=0 range=(-1.570796 1.570796) clamped=false
        Coordinate pelvis_tx: motion_type=translational default_value=0 range=(-5 5) clamped=false
        Coordinate pelvis_ty: motion_type=translational default_value=1 range=(-1 2) clamped=false
        SpatialTransform: axes_held_at_zero=(rotation2 rotation3 translation3)
          TransformAxis rotation1: coordinates=pelvis_tilt axis=(0 0 1) LinearFunction(coefficients=1 0)
          TransformAxis translation1: coordinates=pelvis_tx axis=(1 0 0) LinearFunction(coefficients=1 0)
          TransformAxis translation2: coordinates=pelvis_ty axis=(0 1 0) LinearFunction(coefficients=1 0)
    Body femur_r: mass=9.3014 mass_center=(0 -0.17 0) inertia_xx=0.1339 inertia_yy=0.0351 inertia_zz=0.1412
        meshes=femur.vtp
      PinJoint hip_r: parent_body=pelvis location_in_parent=(-0.0707 -0.0661 0.0835) location=(0 0 0)
        Coordinate hip_flexion_r: motion_type=rotational default_value=0 range=(-0.5235988 2.094395) clamped=false
    Body tibia_r: mass=3.7075 mass_center=(0 -0.1867 0) inertia_xx=0.0504 inertia_yy=0.0051 inertia_zz=0.0511
        meshes=(tibia.vtp fibula.vtp)
      PinJoint knee_r: parent_body=femur_r location_in_parent=(0 -0.396 0) location=(0 0 0)
        Coordinate knee_extension_r: motion_type=rotational default_value=0 range=(-2.094395 0.1745329) clamped=false
    Body calcn_r: mass=1.25 mass_center=(0.1 0.03 0) inertia_xx=0.0014 inertia_yy=0.0039 inertia_zz=0.0041
        meshes=(foot.vtp talus.vtp bofoot.vtp)
      PinJoint ankle_r: parent_body=tibia_r location_in_parent=(0 -0.43 0) location=(0.04877 0.04195 -0.00792)
        Coordinate ankle_dorsiflexion_r: motion_type=rotational default_value=0 range=(-1.047198 0.4363323)
            clamped=false
    Body femur_l: mass=9.3014 mass_center=(0 -0.17 0) inertia_xx=0.1339 inertia_yy=0.0351 inertia_zz=0.1412
        meshes=l_femur.vtp
      PinJoint hip_l: parent_body=pelvis location_in_parent=(-0.0707 -0.0661 -0.0835) location=(0 0 0)
        Coordinate hip_flexion_l: motion_type=rotational default_value=0 range=(-0.5235988 2.094395) clamped=false
    Body tibia_l: mass=3.7075 mass_center=(0 -0.1867 0) inertia_xx=0.0504 inertia_yy=0.0051 inertia_zz=0.0511
        meshes=(l_tibia.vtp l_fibula.vtp)
      PinJoint knee_l: parent_body=femur_l location_in_parent=(0 -0.396 0) location=(0 0 0)
        Coordinate knee_extension_l: motion_type=rotational default_value=0 range=(-2.094395 0.1745329) clamped=false
    Body calcn_l: mass=1.25 mass_center=(0.1 0.03 0) inertia_xx=0.0014 inertia_yy=0.0039 inertia_zz=0.0041
        meshes=(l_foot.vtp l_talus.vtp l_bofoot.vtp)
      PinJoint ankle_l: parent_body=tibia_l location_in_parent=(0 -0.43 0) location=(0.04877 0.04195 0.00792)
        Coordinate ankle_dorsiflexion_l: motion_type=rotational default_value=0 range=(-1.047198 0.4363323)
            clamped=false
    Body torso: mass=34.2366 mass_center=(-0.03 0.32 0) inertia_xx=1.4745 inertia_yy=0.7555 inertia_zz=1.4314
        meshes=(hat_spine.vtp hat_jaw.vtp hat_skull.vtp hat_ribs.vtp)
      WeldJoint back: parent_body=pelvis location_in_parent=(-0.1007 0.0815 0) location=(0 0 0)
  ForceSet:
    Millard2012EquilibriumMuscle [values shared by the 18 below unless stated]: min_control=0 max_control=1
        optimal_force=1 max_contraction_velocity=10 minimum_activation=0.01
      ActiveForceLengthCurve: minimum_value=0
      ForceVelocityCurve: concentric_slope_at_vmax=0 concentric_slope_near_vmax=0.25 isometric_slope=5
          eccentric_slope_at_vmax=0 eccentric_slope_near_vmax=0.15 max_eccentric_velocity_force_multiplier=1.4
      FiberForceLengthCurve
      TendonForceLengthCurve
    Millard2012EquilibriumMuscle hamstrings_r: max_isometric_force=2594 optimal_fiber_length=0.0976
        tendon_slack_length=0.319 pennation_angle_at_optimal=0.2025 [radians]
      PathPoint bifemlh_r-P1: pelvis (-0.12596 -0.10257 0.06944)
      PathPoint bifemlh_r-P2: tibia_r (-0.028 -0.02 0.02943)
      PathPoint bifemlh_r-P3: tibia_r (-0.021 -0.04 0.0343)
    Millard2012EquilibriumMuscle bifemsh_r: max_isometric_force=804 optimal_fiber_length=0.1103
        tendon_slack_length=0.095 pennation_angle_at_optimal=0.2147
      PathPoint P1: femur_r (0.005 -0.2111 0.0234)
      PathPoint P2: tibia_r (-0.028 -0.02 0.02943)
      PathPoint P3: tibia_r (-0.021 -0.04 0.0343)
    Millard2012EquilibriumMuscle glut_max_r: max_isometric_force=1944 optimal_fiber_length=0.1569
        tendon_slack_length=0.111 pennation_angle_at_optimal=0.3822
      PathPoint glut_max2_r-P1: pelvis (-0.1349 0.0176 0.0563)
      PathPoint glut_max2_r-P2: pelvis (-0.1376 -0.052 0.0914)
      PathPoint glut_max2_r-P3: femur_r (-0.0426 -0.053 0.0293)
      PathPoint glut_max2_r-P4: femur_r (-0.0156 -0.1016 0.0419)
    Millard2012EquilibriumMuscle iliopsoas_r: max_isometric_force=2186 optimal_fiber_length=0.1066
        tendon_slack_length=0.152 pennation_angle_at_optimal=0.2496
      PathPoint psoas_r-P1: pelvis (-0.0647 0.0887 0.0289)
      PathPoint psoas_r-P2: pelvis (-0.03 -0.01 0.076)
      PathPoint psoas_r-P4: femur_r (0.033 -0.035 0.0038)
      PathPoint psoas_r-P5: femur_r (-0.0188 -0.0597 0.0104)
    Millard2012EquilibriumMuscle rect_fem_r: max_isometric_force=1169 optimal_fiber_length=0.0759
        tendon_slack_length=0.3449 pennation_angle_at_optimal=0.2426
      PathPoint P1: pelvis (-0.0295 -0.0311 0.0968)
      PathPoint P2: femur_r (0.038 -0.34 0.004)
      PathPoint P3: tibia_r (0.038 0.025 0.0018)
    Millard2012EquilibriumMuscle vasti_r: max_isometric_force=4530 optimal_fiber_length=0.0993
        tendon_slack_length=0.1231 pennation_angle_at_optimal=0.0785
      PathPoint vas_int_r-P1: femur_r (0.029 -0.1924 0.031)
      PathPoint vas_int_r-P2: femur_r (0.038 -0.34 0.007)
      PathPoint vas_int_r-P3: tibia_r (0.038 0.025 0.0018)
    Millard2012EquilibriumMuscle gastroc_r: max_isometric_force=2241 optimal_fiber_length=0.051
        tendon_slack_length=0.384 pennation_angle_at_optimal=0.1728
      PathPoint gas_med_r-P1: femur_r (-0.02 -0.388 -0.024)
      PathPoint gas_med_r-P3: calcn_r (0.005 0.031 -0.0053)
    Millard2012EquilibriumMuscle soleus_r: max_isometric_force=3549 optimal_fiber_length=0.044
        tendon_slack_length=0.248 pennation_angle_at_optimal=0.4939
      PathPoint P1: tibia_r (-0.0024 -0.1533 0.0071)
      PathPoint P2: calcn_r (0.005 0.031 -0.0053)
    Millard2012EquilibriumMuscle tib_ant_r: max_isometric_force=1579 optimal_fiber_length=0.0683
        tendon_slack_length=0.243 pennation_angle_at_optimal=0.1676
      PathPoint P1: tibia_r (0.0179 -0.1624 0.0115)
      PathPoint P2: tibia_r (0.0329 -0.3951 -0.0177)
      PathPoint P3: calcn_r (0.1166 0.0178 -0.0305)
    Millard2012EquilibriumMuscle hamstrings_l: max_isometric_force=2594 optimal_fiber_length=0.0976
        tendon_slack_length=0.319 pennation_angle_at_optimal=0.2025
      PathPoint bifemlh_l-P1: pelvis (-0.12596 -0.10257 -0.06944)
      PathPoint bifemlh_l-P2: tibia_l (-0.028 -0.02 -0.02943)
      PathPoint bifemlh_l-P3: tibia_l (-0.021 -0.04 -0.0343)
    Millard2012EquilibriumMuscle bifemsh_l: max_isometric_force=804 optimal_fiber_length=0.1103
        tendon_slack_length=0.095 pennation_angle_at_optimal=0.2147
      PathPoint P1: femur_l (0.005 -0.2111 -0.0234)
      PathPoint P2: tibia_l (-0.028 -0.02 -0.02943)
      PathPoint P3: tibia_l (-0.021 -0.04 -0.0343)
    Millard2012EquilibriumMuscle glut_max_l: max_isometric_force=1944 optimal_fiber_length=0.1569
        tendon_slack_length=0.111 pennation_angle_at_optimal=0.3822
      PathPoint glut_max2_l-P1: pelvis (-0.1349 0.0176 -0.0563)
      PathPoint glut_max2_l-P2: pelvis (-0.1376 -0.052 -0.0914)
      PathPoint glut_max2_l-P3: femur_l (-0.0426 -0.053 -0.0293)
      PathPoint glut_max2_l-P4: femur_l (-0.0156 -0.1016 -0.0419)
    Millard2012EquilibriumMuscle iliopsoas_l: max_isometric_force=2186 optimal_fiber_length=0.1066
        tendon_slack_length=0.152 pennation_angle_at_optimal=0.2496
      PathPoint psoas_l-P1: pelvis (-0.0647 0.0887 -0.0289)
      PathPoint psoas_l-P2: pelvis (-0.03 -0.01 -0.076)
      PathPoint psoas_l-P4: femur_l (0.033 -0.035 -0.0038)
      PathPoint psoas_l-P5: femur_l (-0.0188 -0.0597 -0.0104)
    Millard2012EquilibriumMuscle rect_fem_l: max_isometric_force=1169 optimal_fiber_length=0.0759
        tendon_slack_length=0.3449 pennation_angle_at_optimal=0.2426
      PathPoint P1: pelvis (-0.0295 -0.0311 -0.0968)
      PathPoint P2: femur_l (0.038 -0.34 -0.004)
      PathPoint P3: tibia_l (0.038 0.025 -0.0018)
    Millard2012EquilibriumMuscle vasti_l: max_isometric_force=4530 optimal_fiber_length=0.0993
        tendon_slack_length=0.1231 pennation_angle_at_optimal=0.0785
      PathPoint vas_int_l-P1: femur_l (0.029 -0.1924 -0.031)
      PathPoint vas_int_l-P2: femur_l (0.038 -0.34 -0.007)
      PathPoint vas_int_l-P3: tibia_l (0.038 0.025 -0.0018)
    Millard2012EquilibriumMuscle gastroc_l: max_isometric_force=2241 optimal_fiber_length=0.051
        tendon_slack_length=0.384 pennation_angle_at_optimal=0.1728
      PathPoint gas_med_l-P1: femur_l (-0.02 -0.388 0.024)
      PathPoint gas_med_l-P3: calcn_l (0.005 0.031 0.0053)
    Millard2012EquilibriumMuscle soleus_l: max_isometric_force=3549 optimal_fiber_length=0.044
        tendon_slack_length=0.248 pennation_angle_at_optimal=0.4939
      PathPoint P1: tibia_l (-0.0024 -0.1533 -0.0071)
      PathPoint P2: calcn_l (0.005 0.031 0.0053)
    Millard2012EquilibriumMuscle tib_ant_l: max_isometric_force=1579 optimal_fiber_length=0.0683
        tendon_slack_length=0.243 pennation_angle_at_optimal=0.1676
      PathPoint P1: tibia_l (0.0179 -0.1624 -0.0115)
      PathPoint P2: tibia_l (0.0329 -0.3951 0.0177)
      PathPoint P3: calcn_l (0.1166 0.0178 0.0305)
    HuntCrossleyForce foot_r: transition_velocity=0.15
      ContactParametersSet contact_parameters:
        ContactParameters: geometry=(platform heel_r toe_r) stiffness=5000000 dissipation=1 static_friction=0.9
            dynamic_friction=0.6 viscous_friction=0.6
    HuntCrossleyForce foot_l: transition_velocity=0.15
      ContactParametersSet contact_parameters:
        ContactParameters: geometry=(platform heel_l toe_l) stiffness=5000000 dissipation=1 static_friction=0.9
            dynamic_friction=0.6 viscous_friction=0.6
    CoordinateLimitForce KneeLimit_r: coordinate=knee_extension_r upper_stiffness=2 [N*m/degree]
        upper_limit=-5 [degrees] lower_stiffness=2 [N*m/degree] lower_limit=-120 [degrees] damping=0.5
        transition=0.01 [degrees]
    CoordinateLimitForce KneeLimit_l: coordinate=knee_extension_l upper_stiffness=2 upper_limit=-5 lower_stiffness=2
        lower_limit=-120 damping=0.5 transition=0.01
  ContactGeometrySet:
    ContactHalfSpace platform: body_name=ground location=(0 0 0) orientation=(0 0 -1.570796)
    ContactSphere heel_r: body_name=calcn_r location=(0.015 0.015 -0.005) radius=0.03
    ContactSphere toe_r: body_name=calcn_r location=(0.185 0.015 0) radius=0.03
    ContactSphere heel_l: body_name=calcn_l location=(0.015 0.015 0.005) radius=0.03
    ContactSphere toe_l: body_name=calcn_l location=(0.185 0.015 0) radius=0.03
  ProbeSet:
    Umberger2010MuscleMetabolicsProbe metabolics: probe_operation=integrate activation_maintenance_rate_on=true
        shortening_rate_on=true basal_rate_on=true mechanical_work_rate_on=true report_total_metabolics_only=true
      Umberger2010MuscleMetabolicsProbe_MetabolicMuscleParameterSet:
        Umberger2010MuscleMetabolicsProbe_MetabolicMuscleParameter hamstrings_r: ratio_slow_twitch_fibers=0.496
            use_provided_muscle_mass=false
        Umberger2010MuscleMetabolicsProbe_MetabolicMuscleParameter bifemsh_r: ratio_slow_twitch_fibers=0.669
            use_provided_muscle_mass=false
        Umberger2010MuscleMetabolicsProbe_MetabolicMuscleParameter glut_max_r: ratio_slow_twitch_fibers=0.524
            use_provided_muscle_mass=false
        Umberger2010MuscleMetabolicsProbe_MetabolicMuscleParameter iliopsoas_r: ratio_slow_twitch_fibers=0.492
            use_provided_muscle_mass=false
        Umberger2010MuscleMetabolicsProbe_MetabolicMuscleParameter rect_fem_r: ratio_slow_twitch_fibers=0.378
            use_provided_muscle_mass=false
        Umberger2010MuscleMetabolicsProbe_MetabolicMuscleParameter vasti_r: ratio_slow_twitch_fibers=0.474
            use_provided_muscle_mass=false
        Umberger2010MuscleMetabolicsProbe_MetabolicMuscleParameter gastroc_r: ratio_slow_twitch_fibers=0.489
            use_provided_muscle_mass=false
        Umberger2010MuscleMetabolicsProbe_MetabolicMuscleParameter soleus_r: ratio_slow_twitch_fibers=0.877
            use_provided_muscle_mass=false
        Umberger2010MuscleMetabolicsProbe_MetabolicMuscleParameter tib_ant_r: ratio_slow_twitch_fibers=0.73
            use_provided_muscle_mass=false
        Umberger2010MuscleMetabolicsProbe_MetabolicMuscleParameter hamstrings_l: ratio_slow_twitch_fibers=0.496
            use_provided_muscle_mass=false
        Umberger2010MuscleMetabolicsProbe_MetabolicMuscleParameter bifemsh_l: ratio_slow_twitch_fibers=0.669
            use_provided_muscle_mass=false
        Umberger2010MuscleMetabolicsProbe_MetabolicMuscleParameter glut_max_l: ratio_slow_twitch_fibers=0.524
            use_provided_muscle_mass=false
        Umberger2010MuscleMetabolicsProbe_MetabolicMuscleParameter iliopsoas_l: ratio_slow_twitch_fibers=0.492
            use_provided_muscle_mass=false
        Umberger2010MuscleMetabolicsProbe_MetabolicMuscleParameter rect_fem_l: ratio_slow_twitch_fibers=0.378
            use_provided_muscle_mass=false
        Umberger2010MuscleMetabolicsProbe_MetabolicMuscleParameter vasti_l: ratio_slow_twitch_fibers=0.474
            use_provided_muscle_mass=false
        Umberger2010MuscleMetabolicsProbe_MetabolicMuscleParameter gastroc_l: ratio_slow_twitch_fibers=0.489
            use_provided_muscle_mass=false
        Umberger2010MuscleMetabolicsProbe_MetabolicMuscleParameter soleus_l: ratio_slow_twitch_fibers=0.877
            use_provided_muscle_mass=false
        Umberger2010MuscleMetabolicsProbe_MetabolicMuscleParameter tib_ant_l: ratio_slow_twitch_fibers=0.73
            use_provided_muscle_mass=false
